// COMSOL Multiphysics 6.0.0.354 model "burgers1d.mph"
// Outline of the model tree

Parameters
  nu = 0.01/pi

Geometry
  geom1 "几何 1" (1D, length unit m)
    i1: Interval "线段间隔 1" | coord = {-1, 1}; p1 = -1
    fin: Finalize "形成联合体"

Physics
  cdeq: ConvectionDiffusionEquation "对流-扩散方程" on all domains
    dependent variable u
    cdeq1: ConvectionDiffusionEquation "对流-扩散方程 1" (default) | f = 0; c = nu; be = u
    zflx1: ZeroFluxBoundary "零通量 1" (default)
    init1: init "初始值 1" (default) | u = -sin(pi*x)
    dir1: DirichletBoundary "狄利克雷边界条件 1" on boundaries 1, 2 | r = 0

Mesh
  mesh1 "网格 1" (physics-controlled)
    size: MeshSizeDefault "大小" | hauto = 1

Studies
  std1 "研究 1"
    time: Transient "瞬态" | tlist = range(0,0.1,1)

Solver configurations
  sol1 "解 1" (study std1)
    v1: Variables "因变量 1"
    t1: Time "瞬态求解器 1"
      dDef: Direct "直接"
      fc1: FullyCoupled "全耦合 1"

Datasets
  dset1: Solution | solution = sol1
  par1: Parametric1D "一维参数化拉伸 1" | data = dset1

Plots
  pg1: PlotGroup1D "一维绘图组 1" | data = dset1
    lngr1: LineGraph "线图 1" on all domains | data = dset1; expr = u; xdata = expr; xdataexpr = x
  pg2: PlotGroup2D "二维绘图组 2" | data = par1
    surf1: Surface "表面 1" | data = par1; expr = u
      hght1: Height "高度表达式 1" (disabled) | expr = u

Exports
  data1: Data "数据 1" | data = dset1; expr = u; filename = burgers1d.txt