// COMSOL Multiphysics 6.0.0.354 model "heat2d_CG.mph"
// Outline of the model tree

Geometry
  geom1 "几何 1" (2D, length unit m)
    r1: Rectangle "矩形 1" | base = center; size = {16, 24}
    c1: Circle "圆 1" | pos = {4, 3}
    c2: Circle "圆 2" | pos = {4, 9}
    c3: Circle "圆 3" | pos = {4, -3}
    c4: Circle "圆 4" | pos = {4, -9}
    c5: Circle "圆 5" | pos = {-4, 3}
    c6: Circle "圆 6" | pos = {-4, 9}
    c7: Circle "圆 7" | pos = {-4, -3}
    c8: Circle "圆 8" | pos = {-4, -9}
    c9: Circle "圆 9" | pos = {0, 6}
    c10: Circle "圆 10"
    c11: Circle "圆 11" | pos = {0, -6}
    c12: Circle "圆 12" | pos = {3.2, 6}; r = 0.4
    c13: Circle "圆 13" | pos = {3.2, 0}; r = 0.4
    c14: Circle "圆 14" | pos = {3.2, -6}; r = 0.4
    c15: Circle "圆 15" | pos = {-3.2, 6}; r = 0.4
    c16: Circle "圆 16" | pos = {-3.2, 0}; r = 0.4
    c17: Circle "圆 17" | pos = {-3.2, -6}; r = 0.4
    dif1: Difference "差集 1"
      input = r1
      input2 = c1, c10, c11, c12, c13, c14, c15, c16, c17, c2, c3, c4, c5, c6, c7, c8, c9
    fin: Finalize "形成联合体"

Physics
  hteq: HeatEquation "热方程" on all domains
    dependent variable u
    hteq1: HeatEquation "热方程 1" (default) | f = 0
    zflx1: ZeroFluxBoundary "零通量 1" (default)
    init1: init "初始值 1" (default)
    flux1: FluxBoundary "通量/源 1" on boundaries 5-20, 33-44, 51-58, 65-72 | g = 5; q = 1
    flux2: FluxBoundary "通量/源 2" on boundaries 21-32, 45-50, 59-64 | g = 1; q = 1
    flux3: FluxBoundary "通量/源 3" on boundaries 1-4 | g = 0.1; q = 1

Mesh
  mesh1 "网格 1" (physics-controlled)
    size: MeshSizeDefault "大小" | hauto = 1

Studies
  std1 "研究 1"
    time: Transient "瞬态" | tlist = range(0,0.1,3)