// COMSOL Multiphysics 6.0.0.354 model "heat_case4.mph"
// Outline of the model tree

Parameters
  k = 1
  m1 = 4
  m2 = 2

Functions
  an1: Analytic "解析 1" | funcname = u_init; expr = sin(4*pi*x)*sin(3*pi*y); args = {x, y}; argunit = {, }

Geometry
  geom1 "几何 1" (2D, length unit m)
    sq1: Square "正方形 1"
    fin: Finalize "形成联合体"

Physics
  hteq: HeatEquation "热方程" on all domains
    dependent variable u
    hteq1: HeatEquation "热方程 1" (default)
      f = 5*sin(k*u^2)*(1+2*sin(pi*t/4))*sin(m1*pi*x)*sin(m2*pi*y)
      c = {0.001, 0, 0, 0.001}
    zflx1: ZeroFluxBoundary "零通量 1" (default)
    init1: init "初始值 1" (default) | u = u_init(x,y)
    dir1: DirichletBoundary "狄利克雷边界条件 1" on boundaries 1-4 | r = 0

Mesh
  mesh1 "网格 1" (physics-controlled)
    size: MeshSizeDefault "大小" | hauto = 2

Studies
  std1 "研究 1"
    time: Transient "瞬态" | tlist = range(0,0.05,100)

Solver configurations
  sol1 "解 1" (study std1)
    v1: Variables "因变量 1"
    t1: Time "瞬态求解器 1" | tlist = range(0,0.05,100)
      dDef: Direct "直接"
      fc1: FullyCoupled "全耦合 1" | linsolver = dDef

Datasets
  dset1: Solution | solution = sol1

Plots
  pg1: PlotGroup2D "二维绘图组 1" | data = dset1
    surf1: Surface "表面 1" | expr = u