// COMSOL Multiphysics 6.0.0.354 model "k-s.mph"
// Outline of the model tree

Parameters
  alpha = 100/16
  beta = 100/(16^2)
  gamma = 100/(16^4)

Geometry
  geom1 "几何 1" (1D, length unit m)
    i1: Interval "线段间隔 1" | coord = {0, 2*pi}
    fin: Finalize "形成联合体"

Physics
  g: GeneralFormPDE "一般形式偏微分方程" on all domains
    dependent variable u
    gfeq1: GeneralFormPDE "一般形式偏微分方程 1" (default) | f = 0; Ga = alpha*u^2/2+beta*ux+gamma*u2x; da = 1
    zflx1: ZeroFluxBoundary "零通量 1" (default)
    init1: init "初始值 1" (default) | u = cos(x)*(1+sin(x))
  g2: GeneralFormPDE "一般形式偏微分方程 2" on all domains
    dependent variable u2
    gfeq1: GeneralFormPDE "一般形式偏微分方程 1" (default) | f = u2; Ga = ux; da = 0
    zflx1: ZeroFluxBoundary "零通量 1" (default)
    init1: init "初始值 1" (default) | u2 = -cos(x) - 2*sin(2*x)

Mesh
  mesh1 "网格 1" (physics-controlled)

Studies
  std1 "研究 1"
    time: Transient "瞬态" | tlist = range(0,0.01,0.1)

Solver configurations
  sol1 "解 1" (study std1)
    v1: Variables "因变量 1"
    t1: Time "瞬态求解器 1" | tlist = range(0,0.01,0.1)
      dDef: Direct "直接"
      fc1: FullyCoupled "全耦合 1" | linsolver = dDef

Datasets
  dset1: Solution | solution = sol1
  par1: Parametric1D "一维参数化拉伸 1" | data = dset1

Plots
  pg1: PlotGroup1D "一维绘图组 1" | data = dset1
    lngr1: LineGraph "线结果图 1" on all domains | expr = u; xdata = expr; xdataexpr = x
  pg2: PlotGroup1D "一维绘图组 2" | data = dset1
    lngr1: LineGraph "线结果图 1" on all domains | expr = u2; xdata = expr; xdataexpr = x
  pg3: PlotGroup2D "二维绘图组 3" | data = par1