// COMSOL Multiphysics 6.0.0.354 model "ns_case2_nocirc.mph"
// Outline of the model tree

Parameters
  Re = 100

Functions
  an1: Analytic "解析 1" | funcname = uin; expr = y*(1-y)*4; args = y

Geometry
  geom1 "几何 1" (2D, length unit m)
    r1: Rectangle "矩形 1" | size = {4, 2}
    r2: Rectangle "矩形 2" | pos = {0, 1}; size = {2, 1}
    dif1: Difference "差集 1" | input = r1; input2 = r2
    fin: Finalize "形成联合体"

Materials
  mat1: Common "材料 1" on domains 1
    def "基本"
      density = 1
      dynamicviscosity = 1/Re

Physics
  spf: LaminarFlow "层流" on all domains
    dependent variable u = {u, v, w}
    fp1: FluidProperties "流体属性 1" (default)
    init1: init "初始值 1" (default)
    wallbc1: WallBC "壁 1" (default)
    inl1: InletBoundary "入口 1" on boundaries 1 | U0in = uin(y)
    out1: OutletBoundary "出口 1" on boundaries 6 | NormalFlow = 1

Mesh
  mesh1 "网格 1" (physics-controlled)
    size: MeshSizeDefault "大小" | table = cfd; hauto = 3

Studies
  std1 "研究 1"
    stat: Stationary "稳态"

Solver configurations
  sol1 "解 1" (study std1)
    v1: Variables "因变量 1"
    s1: Stationary "稳态求解器 1"
      fc1: FullyCoupled "全耦合 1" | linsolver = d1; initstep = 0.01; maxiter = 100
      d1: Direct "直接，流体流动变量 (spf)" | linsolver = pardiso; pivotperturb = 1.0E-13

Datasets
  dset1: Solution | solution = sol1

Plots
  pg1: PlotGroup2D "速度 (spf)" | data = dset1
    surf1: Surface "表面" | expr = u; descr = 速度场，x 分量
      hght1: Height "高度表达式 1" (disabled) | expr = spf.U
    surf2: Surface "表面 2" | expr = v
  pg2: PlotGroup2D "压力 (spf)" | data = dset1
    con1: Contour "等值线" | expr = p; unit = Pa; descr = 压力
    surf1: Surface "表面 1" | expr = p; unit = Pa; descr = 压力
      hght1: Height "高度表达式 1" (disabled) | expr = spf.U

Exports
  data1: Data "数据 1"
    data = dset1
    expr = {u, v, p}
    filename = C:\Users\11228\OneDrive\科研\benchmark\data\ns_case2_nocirc.txt