// COMSOL Multiphysics 6.0.0.354 model "ns2d_LT.mph"
// Outline of the model tree

Parameters
  Re = 100
  A1 = 1
  A2 = 1
  A3 = 1

Functions
  an1: Analytic "解析 1" | funcname = fy; expr = sin(pi*x)*sin(pi*y)*sin(pi*t); args = {x, y, t}
  an2: Analytic "解析 2" | funcname = uin; expr = sin(pi*y)*(A1*sin(pi*t)+A2*sin(3*pi*t)+A3*sin(5*pi*t)); args = {y, t}

Geometry
  geom1 "几何 1" (2D, length unit m)
    r1: Rectangle "矩形 1" | size = {2, 1}
    fin: Finalize "形成联合体"

Materials
  mat1: Common "材料 1" on all domains
    def "基本"
      density = 1
      dynamicviscosity = 1/Re

Physics
  spf: LaminarFlow "层流" on all domains
    dependent variable u = {u, v, w}
    fp1: FluidProperties "流体属性 1" (default)
    init1: init "初始值 1" (default)
    wallbc1: WallBC "壁 1" (default)
    vf1: VolumeForce "体积力 1" on domains 1 | F = {0, -fy(x,y,t), 0}
    inl1: InletBoundary "入口 1" on boundaries 1 | U0in = uin(y,t)
    out1: OutletBoundary "出口 1" on boundaries 4

Mesh
  mesh1 "网格 1" (physics-controlled)
    size: MeshSizeDefault "大小" | table = cfd; hauto = 4

Studies
  std1 "研究 1"
    time: Transient "瞬态" | tlist = range(0,0.1,5)