// COMSOL Multiphysics 6.0.0.354 model "ns_case1.mph"
// Outline of the model tree
// Unit system: none

Parameters
  Re = 1  // Reynolds number
  xR = 1-.1328  // x-coordinate for right vortex
  yR = 0.1484  // y-coordinate for right vortex
  xL = .0781  // x-coordinate for left vortex
  yL = .0781  // y-coordinate for left vortex
  xC = .6172  // x-coordinate for center vortex
  yC = .7344  // y-coordinate for center vortex
  a = 4

Geometry
  geom1 "几何 1" (2D, length unit m)
    sq1: Square "正方形 1" | size = 5
    fin: Finalize "形成联合体"

Materials
  mat1: Common "材料 1" on all domains
    def "基本"
      dynamicviscosity = 1
      density = 1

Physics
  spf: LaminarFlow "层流" on all domains
    dependent variable u = {u, v, w}
    PhysicalModelProperty.BackCompState = 2
    fp1: FluidProperties "流体属性 1" (default)
      m_pow_mat = from_mat
      mu_inf_mat = from_mat
      lam_car_mat = from_mat
      n_car_mat = from_mat
    init1: init "初始值 1" (default)
    wallbc1: WallBC "壁 1" (default) | beta = 0.5*spf.hmin
    wallbc2: WallBC "壁 2" on boundaries 3 | uvw = a*x*(5-x); SlidingWall = 1; beta = 0.5*spf.hmin
    prpc1: PressurePointConstraint "压力点约束 1" on points 1 | constraintType = symmetricConstraint

Mesh
  mesh1 "网格 1"
    size: MeshSizeDefault "大小" | hmax = 0.335; hmin = 0.0015; hcurve = 0.3; hgrad = 1.3
    map1: Map "映射 1" on remaining entities
      dis1: Distribution "分布 1" on all boundaries
        type = predefined
        elemcount = 100
        elemratio = 5
        growthrate = exponential
        symmetric = on

Studies
  std1 "研究 1"
    stat: Stationary "稳态" | useparam = on; pname = Re; plistarr = 1

Solver configurations
  sol1 "解 1" (study std1)
    v1: Variables "因变量 1"
    s1: Stationary "稳态求解器 1"
      p1: Parametric "参数化 1" | pname = Re; plistarr = 1
      fc1: FullyCoupled "全耦合 1" | linsolver = d1; initstep = 0.01; maxiter = 100
      d1: Direct "直接，流体流动变量 (spf)" | linsolver = pardiso; pivotperturb = 1.0E-13

Datasets
  dset1: Solution | solution = sol1

Plots
  pg1: PlotGroup2D "速度 (spf)" | data = dset1
    surf1: Surface "表面" | expr = u
    arws1: ArrowSurface "面上箭头 1" (disabled) | expr = {u, v}
  pg2: PlotGroup2D "压力 (spf)" | data = dset1
    con1: Contour "等值线" | expr = p; levelrounding = off
  pg3: PlotGroup2D "Streamline Plot" | data = dset1
    str1: Streamline "流线 1" | expr = {u, v}; udist = 0.02

Exports
  plot1: Plot "绘图 1"
  data1: Data "数据 1"
    data = dset1
    expr = {u, v, p}
    descr = {速度场x 分量, 速度场y 分量, 压力}
    filename = C:\Users\tibo_\Documents\zyc科研\本科毕设\comsol\comsol_example_files\comsol_example_files\lid_driven.txt
    sort = on