// COMSOL Multiphysics 6.0.0.354 model "poisson_case2.mph"
// Outline of the model tree

Parameters
  mu1 = 1
  mu2 = 4
  k = 8
  A = 10

Functions
  an1: Analytic "解析 1" | funcname = f_source; expr = A*(mu1^2+x^2+mu2^2+y^2)*sin(mu1*pi*x)*sin(mu2*pi*y); args = {x, y}

Geometry
  geom1 "几何 1" (2D, length unit m)
    sq1: Square "正方形 1" | base = center; size = 2
    c1: Circle "圆 1" | pos = {0.5, 0.5}; r = 0.2
    c2: Circle "圆 2" | pos = {0.4, -0.4}; r = 0.4
    c3: Circle "圆 3" | pos = {-0.2, -0.7}; r = 0.1
    c4: Circle "圆 4" | pos = {-0.6, 0.5}; r = 0.3
    dif1: Difference "差集 1" | input = sq1; input2 = c1, c2, c3, c4
    fin: Finalize "形成联合体"

Physics
  hzeq: HelmholtzEquation "亥姆霍兹方程" on all domains
    dependent variable u
    heq1: HelmholtzEquation "亥姆霍兹方程 1" (default) | a = k^2; f = f_source(x, y)
    zflx1: ZeroFluxBoundary "零通量 1" (default)
    init1: init "初始值 1" (default)
    dir1: DirichletBoundary "狄利克雷边界条件 1" on boundaries 1-4 | r = 0.2
    dir2: DirichletBoundary "狄利克雷边界条件 2" on boundaries 5-20 | r = 1

Mesh
  mesh1 "网格 1" (physics-controlled)
    size: MeshSizeDefault "大小" | hauto = 2

Studies
  std1 "研究 1"
    stat: Stationary "稳态"

Solver configurations
  sol1 "解 1" (study std1)
    v1: Variables "因变量 1"
    s1: Stationary "稳态求解器 1"
      dDef: Direct "直接"
      fc1: FullyCoupled "全耦合 1" | linsolver = dDef

Datasets
  dset1: Solution | solution = sol1

Plots
  pg2: PlotGroup2D "二维绘图组 1" | data = dset1
    surf1: Surface "表面 1" | expr = u
      hght1: Height "高度表达式 1" (disabled) | expr = u

Exports
  data1: Data "数据 1" | data = dset1; expr = u; filename = poisson_case2.txt