// COMSOL Multiphysics 5.3.1.201 model "poisson2d_cg1.mph"
// Outline of the model tree

Parameters
  w = 8
  mu = 3

Geometry
  geom1 "几何 1" (2D, length unit m)
    sq1: Square "正方形 1" | base = center; size = w
    c1: Circle "圆 1" | pos = {0.6*w/2, 0.6*w/2}; r = 0.2*w/2
    dif1: Difference "差集 1" | input = sq1; input2 = c1
    fin: Finalize "形成联合体"

Physics
  poeq: PoissonEquation "泊松方程" on all domains
    dependent variable u
    peq1: PoissonEquation "泊松方程 1" (default) | f = 2*(mu*pi/w)^2*sin(mu*(x-w/2)*pi/w)*sin(mu*(y-w/2)*pi/w)
    zflx1: ZeroFluxBoundary "零通量 1" (default)
    init1: init "初始值 1" (default)
    dir1: DirichletBoundary "狄利克雷边界条件 1" on boundaries 1-4 | r = 0
    dir2: DirichletBoundary "狄利克雷边界条件 2" on boundaries 5-8 | r = 1

Mesh
  mesh1 "网格 1" (physics-controlled)
    size: MeshSizeDefault "大小" | hauto = 2

Studies
  std1 "研究 1"
    stat: Stationary "稳态"

Solver configurations
  sol1 "解 1" (study std1)
    v1: Variables "因变量 1"
    s1: Stationary "稳态求解器 1"
      dDef: Direct "直接"
      fc1: FullyCoupled "全耦合 1" | linsolver = dDef

Datasets
  dset1: Solution | solution = sol1

Plots
  pg1: PlotGroup2D "二维绘图组 1" | data = dset1
    surf1: Surface "表面 1" | expr = u