// COMSOL Multiphysics 5.3.1.201 model "possion2d_solver_test.mph"
// Outline of the model tree

Geometry
  geom1 "几何 1" (2D, length unit m)
    sq1: Square "正方形 1"
    fin: Finalize "形成联合体"

Physics
  poeq: PoissonEquation "泊松方程" on all domains
    dependent variable u
    peq1: PoissonEquation "泊松方程 1" (default)
    zflx1: ZeroFluxBoundary "零通量 1" (default)
    init1: init "初始值 1" (default)
    dir1: DirichletBoundary "狄利克雷边界条件 1" on boundaries 1, 2, 4 | r = 0
    dir2: DirichletBoundary "狄利克雷边界条件 2" on boundaries 3 | r = sin(pi*x)

Mesh
  mesh1 "网格 1" (physics-controlled)
    size: MeshSizeDefault "大小" | hauto = 1

Studies
  std1 "研究 1"
    stat: Stationary "稳态"

Solver configurations
  sol1 "解 1" (study std1)
    v1: Variables "因变量 1"
    s1: Stationary "稳态求解器 1"
      fc1: FullyCoupled "全耦合 1" | linsolver = i1; ntermauto = itertol; niter = 10
      i1: Iterative "迭代 1" | linsolver = cg; irestol = 0.001
        ilDef: IncompleteLU "不完全 LU 分解"

Datasets
  dset1: Solution | solution = sol1

Plots
  pg1: PlotGroup2D "二维绘图组 1" | data = dset1
    surf1: Surface "表面 1" | expr = u