// COMSOL Multiphysics 6.0.0.354 model "poisson_case1.mph"
// Outline of the model tree

Parameters
  c = 0.1
  m = 1
  k = 10
  n = 1

Functions
  an1: Analytic "解析 1" | funcname = f_source; expr = ((2*pi*m)^2*c*sin(2*pi*m*x)+2*k^2*sinh(k*x)/(cosh(k*x)^3))*sin(2*pi*n*y)+(2*pi*n)^2*(c*sin(2*pi*m*x)+tanh(k*x))*sin(2*pi*n*y); args = {x, y}
  an4: Analytic "解析 4" | funcname = sol_ref; expr = (c*sin(2*pi*m*x)+tanh(k*x))*sin(2*pi*n*y); args = {x, y}
  an5: Analytic "解析 5" | expr = tanh(x)

Variables
  var1 "变量 1"
    uref = (c*sin(2*pi*m*x)+tanh(k*x))*sin(2*pi*n*y)

Geometry
  geom1 "几何 1" (2D, length unit m)
    sq1: Square "正方形 1" | pos = {-0.00522819161415, -0.00431534647942}; base = center; size = 2
    fin: Finalize "形成联合体"

Physics
  poeq: PoissonEquation "泊松方程" on all domains
    dependent variable u
    peq1: PoissonEquation "泊松方程 1" (default) | f = f_source(x,y)
    zflx1: ZeroFluxBoundary "零通量 1" (default)
    init1: init "初始值 1" (default)
    dir1: DirichletBoundary "狄利克雷边界条件 1" on boundaries 2, 3 | r = 0
    dir2: DirichletBoundary "狄利克雷边界条件 2" on boundaries 1, 4 | r = (c*sin(2*pi*m*x)+tanh(k*x))*sin(2*pi*n*y)

Mesh
  mesh1 "网格 1" (physics-controlled)
    size: MeshSizeDefault "大小" | hauto = 2

Studies
  std1 "研究 1"
    stat: Stationary "稳态"

Solver configurations
  sol1 "解 1" (study std1)
    v1: Variables "因变量 1"
    s1: Stationary "稳态求解器 1"
      dDef: Direct "直接"
      fc1: FullyCoupled "全耦合 1" | linsolver = dDef

Datasets
  dset1: Solution | solution = sol1

Plots
  pg1: PlotGroup2D "二维绘图组 1" | data = dset1
    surf1: Surface "表面 1" | expr = u
      hght1: Height "高度表达式 1" (disabled) | expr = u
  pg2: PlotGroup2D "二维绘图组 2" | data = dset1
    surf1: Surface "表面 1" | data = dset1; expr = u-(c*sin(2*pi*m*x)+tanh(k*x))*sin(2*pi*n*y)

Exports
  data1: Data "数据 1" | data = dset1; expr = u; filename = poisson_case1.txt