// COMSOL Multiphysics 5.3.1.201 model "possion_case4_2d.mph"
// Outline of the model tree

Parameters
  m1 = 5
  m2 = 10
  mu1 = 1
  mu2 = 0.5
  k1 = 1
  k2 = 8
  A1 = 10
  A2 = 100

Functions
  an1: Analytic "解析 1" | funcname = f_source; expr = A1*exp(sin(m1*pi*x)+sin(m2*pi*y))*(x^2+y^2-1)/(x^2+y^2+1)+A2*sin(m1*pi*x)*sin(m2*pi*y); args = {x, y}

Geometry
  geom1 "几何 1" (2D, length unit m)
    r1: Rectangle "矩形 1" | size = {1, 0.5}
    r2: Rectangle "矩形 2" | pos = {0, 0.5}; size = {1, 0.5}
    c1: Circle "圆 1" | pos = {0.4, 0.5}; r = 0.2
    dif1: Difference "差集 1" | input = r1, r2; input2 = c1
    fin: Finalize "形成联合体"

Physics
  hzeq: HelmholtzEquation "亥姆霍兹方程" on all domains
    dependent variable u
    heq1: HelmholtzEquation "亥姆霍兹方程 1" (default) | c = {mu1, 0, 0, mu1}; a = k1^2; f = f_source(x,y)
    zflx1: ZeroFluxBoundary "零通量 1" (default)
    init1: init "初始值 1" (default)
    heq2: HelmholtzEquation "亥姆霍兹方程 2" on domains 2 | c = {mu2, 0, 0, mu2}; a = k2^2; f = f_source(x,y)
    dir1: DirichletBoundary "狄利克雷边界条件 1" (disabled) on boundaries 5 | r = 0
    dir2: DirichletBoundary "狄利克雷边界条件 2" (disabled) on boundaries 2 | r = 0
    pc1: PeriodicCondition "周期性条件 1" (disabled) on boundaries 1, 3, 7, 8 | destinationDomains: boundaries 7, 8
    dir3: DirichletBoundary "狄利克雷边界条件 3" (disabled) on boundaries 1, 3, 7, 8 | r = 0

Mesh
  mesh1 "网格 1" (physics-controlled)
    size: MeshSizeDefault "大小" | hauto = 2

Studies
  std1 "研究 1"
    stat: Stationary "稳态"

Solver configurations
  sol1 "解 1" (study std1)
    v1: Variables "因变量 1"
    s1: Stationary "稳态求解器 1"
      dDef: Direct "直接"
      fc1: FullyCoupled "全耦合 1" | linsolver = dDef

Datasets
  dset1: Solution | solution = sol1

Plots
  pg1: PlotGroup2D "二维绘图组 1" | data = dset1
    surf1: Surface "表面 1" | expr = u
      hght1: Height "高度表达式 1" (disabled) | expr = u