// COMSOL Multiphysics 6.0.0.354 model "wave_darcy.mph"
// Outline of the model tree

Parameters
  mu_x = -0.5
  mu_y = 0
  sigma = 0.3

Functions
  int1: Interpolation "插值 1" | importedname = darcy_2d_coef_256.txt; funcs = {c_fn, 1}; source = file; filename = D:\0Lab\repos\ml4phys\pinnbench\data\wave_darcy2d.txt; nargs = 2; argunit = {, }

Geometry
  geom1 "几何 1" (2D, length unit m)
    sq1: Square "正方形 1" | base = center; size = 2
    fin: Finalize "形成联合体"

Physics
  waeq: WaveEquation "波动方程" on all domains
    dependent variable u
    weq1: WaveEquation "波动方程 1" (default) | c = {c_fn((x+1)/2,(y+1)/2), 0, 0, c_fn((x+1)/2,(y+1)/2)}; f = 0
    zflx1: ZeroFluxBoundary "零通量 1" (default)
    init1: init "初始值 1" (default) | u = exp(-((x-mu_x)*(x-mu_x) + (y-mu_y)*(y-mu_y))/(2*sigma*sigma))

Mesh
  mesh1 "网格 1" (physics-controlled)
    size: MeshSizeDefault "大小" | hauto = 3

Studies
  std1 "研究 1"
    time: Transient "瞬态" | tlist = range(0,0.02,5)

Solver configurations
  sol1 "解 1" (study std1)
    v1: Variables "因变量 1"
    t1: Time "瞬态求解器 1"
      tlist = range(0,0.02,5)
      atolglobalvaluemethod = manual
      atolglobal = 3e-7
      timemethod = genalpha
      rhoinf = 0.98
      dDef: Direct "直接"
      fc1: FullyCoupled "全耦合 1" | ntolfact = 0.1

Datasets
  dset1: Solution | solution = sol1

Plots
  pg1: PlotGroup2D "二维绘图组 1" | data = dset1
    surf1: Surface "表面 1" | expr = u
      hght1: Height "高度表达式 1" | expr = u